ϕ(x) := (3.1 - 3.3*x^2 - x^3)/(-6.2)
α(x) := -33/31*x - 15/31*x^2
pr(q, x1, x2, eps) :=
    x1 ← 0
    x2 ← -1
    k ← 0
    while |x2 - x1| > (1 - q)/q*eps
        x1 ← x2
        x2 ← ϕ(x1)
        k ← k + 1
    [x2; k]
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z := pr(0.581, -1, 0, 10^-10)
z = [-0.418574; 24]
