k := 40
l := 6
m := 40
size := 40
fillMatrixA :=
    for i ∈ 0 .. size - 1
        for j ∈ 0 .. 39
            A[i, j] ← m if j == 3
            A[i, j] ← l if i == (size - 1 - j)
            A[i, j] ← k if i == j
    return A
b(i) := i*e^(10/i)*cos(9/i)
fillMatrixB :=
    for i ∈ 0 .. size - 1
        B[i] ← b(i + 1)
    return B
matrixA := fillMatrixA
matrixB := fillMatrixB
matrixB = [
    -20069; -62.5697; -83.2533; -30.6109; -8.39405; 2.2471; 8.21467; 12.0396; 14.7716; 16.8971
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]
matrixA =  # no stored result
xi(bi, bni) := (bi/(k + l)) - (k*bni/(l^2 - k^2)) + bni/(l - k)
xni(bi, bni) := (bi/(k + l)) - k*bni/(l^2 - k^2)
x4 := xi(matrixB[4], matrixB[size - 1 - 4])
x4 = -0.35914
x36 := xni(matrixB[4], matrixB[size - 1 - 4])
x36 = 0.995256
matrixB2 :=
    for i ∈ 0 .. size - 1
        B2[i] ← matrixB[i] - m*x4 if (i ≠ 4) and (i ≠ 36)
        B2[i] ← matrixB[i] otherwise
    return B2
matrixB2 = [
    -20054.6; -48.2042; -68.8877; -16.2453; -8.39405; 16.6127; 22.5802; 26.4052; 29.1372; 31.2627
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]
solution :=
    for i ∈ 0 .. size/2 - 1
        if i ≠ 3
            res[i] ← xi(matrixB2[i], matrixB2[size - 1 - i])
            res[size - i - 1] ← xni(matrixB2[i], matrixB2[size - i - 1])
    res[3] ← x4
    res[35] ← x36
    return res
x := solution
matrixA*x = [
    -20069; -62.5697; -83.2533; -14.3656; -24.9641; 2.2471; 8.21467; 12.0396; 14.7716; 16.8971
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]
x = [
    -436.217; -1.29125; -1.73704; -0.35914; -0.41425; 0.133233; 0.266825; 0.353842; 0.417104; 0.467185
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]
matrixB = [
    -20069; -62.5697; -83.2533; -30.6109; -8.39405; 2.2471; 8.21467; 12.0396; 14.7716; 16.8971
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]
