N := 8
m := 15 + floor((N - 15)/2)*(-1)^N
q := 1.05 + (-1)^m*m*10^-2
τ := sum(q^(2*l), l = 1 .. 10)
t := m + 10
t = 21
A :=
    for l ∈ 1 .. 10
        for j ∈ 1 .. 10
            a[l - 1, j - 1] ← 2*q^l*t^2 if l == j
            a[l - 1, j - 1] ← 2*τ + (q^l + q^j)*t otherwise
    a
b :=
    for i ∈ 1 .. 10
        b[i - 1] ← τ + 3*q^i
    b
transVector(x, y) :=
    for i ∈ 1 .. rows(x)
        z[i - 1] ← x[i - 1]/y[i - 1, i - 1]
    z
transMatrix(x) :=
    for i ∈ 1 .. rows(x)
        for j ∈ 1 .. cols(x)
            y[i - 1, j - 1] ← (x[i - 1, j - 1]/x[i - 1, i - 1]) if i ≠ j
    y
B := transMatrix(A)
c := transVector(b, A)
B = [
    0, 0.0591901, 0.0578472, 0.0565849, 0.0553984, 0.054283, 0.0532346, 0.0522491, 0.0513227, 0.0504518;
    0.0629682, 0, 0.0600198, 0.058677, 0.0574147, 0.0562281, 0.0551128, 0.0540643, 0.0530788, 0.0521524;
    0.0654676, 0.0638509, 0, 0.0609026, 0.0595597, 0.0582974, 0.0571109, 0.0559955, 0.0549471, 0.0539615;
    0.0681267, 0.0664067, 0.0647899, 0, 0.0618416, 0.0604988, 0.0592365, 0.0580499, 0.0569346, 0.0558861;
    0.0709554, 0.0691257, 0.0674057, 0.065789, 0, 0.0628406, 0.0614978, 0.0602355, 0.0590489, 0.0579336;
    0.0739647, 0.0720182, 0.0701885, 0.0684685, 0.0668517, 0, 0.0639034, 0.0625605, 0.0612983, 0.0601117;
    0.0771661, 0.0750954, 0.0731488, 0.0713191, 0.0695991, 0.0679823, 0, 0.065034, 0.0636912, 0.0624289;
    0.0805719, 0.0783689, 0.0762981, 0.0743516, 0.0725218, 0.0708019, 0.0691851, 0, 0.0662368, 0.0648939;
    0.084195, 0.0818514, 0.0796485, 0.0775777, 0.0756311, 0.0738014, 0.0720814, 0.0704647, 0, 0.0675163;
    0.0880494, 0.0855562, 0.0832127, 0.0810097, 0.0789389, 0.0769924, 0.0751626, 0.0734427, 0.0718259, 0
]
c = [0.00990116; 0.010316; 0.0107574; 0.0112269; 0.0117264; 0.0122578; 0.0128231; 0.0134245; 0.0140643; 0.0147449]
firstApprox(x, n) :=
    for i ∈ 1 .. n
        y[i - 1] ← x
    y
iter(n, B, c, x) :=
    x[:, 1] ← x
    for k ∈ 1 .. n - 1
        x[:, k + 1] ← c - B*x[:, k]
    x[:, n]
x0 := firstApprox(0, 10) = [0; 0; 0; 0; 0; 0; 0; 0; 0; 0]
x := iter(100, B, c, x0) = [0.0060934; 0.00638048; 0.00668644; 0.00701256; 0.00736022; 0.00773089; 0.00812614; 0.00854767; 0.00899731; 0.009477]
A1test := [12, 5, 0, -3; 1, 15, 6, 3; -3, 4, 22, 11; 4, -2, 3, 17]
x1test := [3; 5; -1; 2]
b1test := A1test*x1test = [55; 78; 11; 33]
B1test := transMatrix(A1test)
c1test := transVector(b1test, A1test)
B1test = [
    0, 0.416667, 0, -0.25;
    0.0666667, 0, 0.4, 0.2;
    -0.136364, 0.181818, 0, 0.5;
    0.235294, -0.117647, 0.176471, 0
]
c1test = [4.58333; 5.2; 0.5; 1.94118]
x0test := firstApprox(2, 4) = [2; 2; 2; 2]
x1test := iter(10, B1test, c1test, x0test) = [3.00049; 4.99816; -0.997483; 1.99818]
normB := normi(B) = 0.71419
normVi(x) :=
    max ← |x[0]|
    for l ∈ 1 .. rows(x) - 1
        (max ← |x[l]|) if |x[l]| > max
    max
iterMod(eps, x0, c, B) :=
    x ← x0
    k ← 1
    y ← c - B*x
    while normVi(y - x) > eps*(1 - normi(B))/normi(B)
        x ← y
        y ← c - B*x
        k ← k + 1
    return [y; k]
res := iterMod(10^-10, x0test, c1test, B1test) = [[3; 5; -1; 2]; 34]
x2test := res[0] = [3; 5; -1; 2]
λ := eigenvals(A) = [448.181; 478.966; 511.445; 545.968; 582.781; 622.139; 664.361; 709.939; 759.961; 1051.68]
λmax := max(λ) = 1051.68
λmin := min(λ) = 448.181
ω := |2/(λmax + λmin)| = 0.00133346
E := identity(rows(A))
S := ω*A - E
K := ω*b
x02test := firstApprox(0, 10)
res := iterMod(10^-10, x02test, c, B) = [
    [0.0060934; 0.00638048; 0.00668644; 0.00701256; 0.00736022; 0.00773089; 0.00812614; 0.00854767; 0.00899731; 0.009477]; 39
]
res2 := iterMod(10^-10, x02test, K, S) = [
    [0.0060934; 0.00638048; 0.00668644; 0.00701256; 0.00736022; 0.00773089; 0.00812614; 0.00854767; 0.00899731; 0.009477]; 24
]
x1 := res[0] = [0.0060934; 0.00638048; 0.00668644; 0.00701256; 0.00736022; 0.00773089; 0.00812614; 0.00854767; 0.00899731; 0.009477]
x2 := res2[0] = [0.0060934; 0.00638048; 0.00668644; 0.00701256; 0.00736022; 0.00773089; 0.00812614; 0.00854767; 0.00899731; 0.009477]
