f1(x1, x2) := cos(x1 + x2) + 2*x2
A(x1, x2) := [-sin(x1 + x2), -sin(x1 + x2) + 2; 1, cos(x2)]
f2(x1, x2) := x1 + sin(x2) - 0.6
normVi(x) :=
    max ← |x[0]|
    max ← |x[1]| if |x[1]| > |x[0]|
    return max
f(x1, x2) := [-f1(x1, x2); -f2(x1, x2)]
Newton(x0, eps) :=
    Δx ← lsolve(A(x0[0], x0[1]), f(x0[0], x0[1]))
    x1 ← Δx + x0
    k ← 1
    while normVi(Δx) > eps
        y ← x1
        Δx ← lsolve(A(y[0], y[1]), f(y[0], y[1]))
        x1 ← Δx + y
        k ← k + 1
    return [x1; k]
x01 := [-2; 2]
q1 := Newton(x01, 10^-6)
q1[0] = [1.0041; -0.415997]
q1[1] = 7
TOL := 10^-6
x11 := -2
x12 := 2
Given
f1(x11, x12) == 0
f2(x11, x12) == 0
q21 := Find(x11, x12)
q21 = [1.0041; -0.415997]
